! 1. MPPT Inverter Efficiency Curve (Delta M88H-121: Peak 98.8%, Euro 98.5%)
New "XYCurve.mppt_eff" npts=4 xarray=[0.1 0.2 0.5 1.0] yarray=[0.965 0.980 0.988 0.985]

! 2. Solar PV System on Common Bus (3 x Delta M88H Inverters Aggregated)
! Natively rated at 210.0 kW (kVA=210.0, Pmpp=210.0, WattPriority=Yes)
! Active power curtailment (P_curt) is controlled directly via %Pmpp
New "PVSystem.pv_1" phases=3 bus1=n_pv.1.2.3 kv=0.40 kVA=210.0 Pmpp=210.0 %Pmpp=100.0 %Cutin=0 %Cutout=0 irradiance=1 EffCurve=mppt_eff kvarMax=0.0 kvarMaxAbs=0.0 PF=1.0 ControlMode=GFL WattPriority=Yes daily=solar_shape duty=solar_shape
