New "Transformer.xfmr_0" windings=2 XHL=10 buses=[sbus.1.2.3, slv.1.2.3, ] conns=[delta, wye, ] kVs=[11, 0.23, ] kVAs=[800, 800, ] taps=[1, 1, ] buses=[sbus.1.2.3, slv.1.2.3, ] conns=[delta, wye, ] kVs=[11, 0.23, ] kVAs=[800, 800, ] taps=[1, 1, ] wdg=1 %R=0.2 RdcOhms=0.257125 wdg=2 %R=0.2 RdcOhms=0.0001225813 RdcOhms=0.0001225813
